variable        ibead           uloop 99 pad
# bulk water
units           metal
boundary        p p p
atom_style      atomic
atom_modify     map yes

#neighbor        2.0 bin
neigh_modify    every 10 delay 0 check no

read_data ../initial_config/data.300K_liq128H2O_200ps

mass 		1 15.9994
mass		2 1.00794

pair_style deepmd ../../../model/graph1.pb
pair_coeff      * *


fix 1 all pimd/langevin fmmode physical ensemble npt integrator obabo thermostat PILE_L 975481 temp 300.0 tau 1.0 scale 1.0 barostat BZP aniso 1.0 taup 1.0

dump            1 all custom 200 ${ibead}.xyz id type x y z
dump_modify     1 append yes sort id

timestep        0.0005
thermo_style    custom step temp f_1[1*4] vol
thermo          100
thermo_modify format line "%d %.8e %.8e %.8e %.8e %.8e %.8e %.8e %.8e %.8e %.8e %.8e %.8e %.8e %.8e %.8e %.8e"

run 2000
